// SBML level 2 version 4

model lacy_lacz()
  // lacy_lacz

  // Compartments:
  compartment unnamed = 1;

  // Species:
  species PLac in unnamed = 0;
  species RNAP in unnamed = 0;
  species PLacRNAP in unnamed = 0;
  species TrLacZ1 in unnamed = 0;
  species RbsLacZ in unnamed = 0;
  species TrLacZ2 in unnamed = 0;
  species TrLacY2 in unnamed = 0;
  species TrLacY1 in unnamed = 0;
  species RbsLacY in unnamed = 0;
  species Ribosome in unnamed = 0;
  species RbsribosomeLacZ in unnamed = 0;
  species RbsribosomeLacY in unnamed = 0;
  species TrRbsLacZ in unnamed = 0;
  species RbsribsomeLacY in unnamed = 0;
  species TrRbsLacY in unnamed = 0;
  species LacZ in unnamed = 0;
  species LacY in unnamed = 0;
  species dgrLacZ in unnamed = 0;
  species dgrLacY in unnamed = 0;
  species dgrRbsLacY in unnamed = 0;
  species lactose in unnamed = 0;
  species LacZlactose in unnamed = 0;
  species product in unnamed = 0;

  // Reactions:
  reaction_25: PLac + RNAP => PLacRNAP; k01*PLac*RNAP;
    k01 = 0.17;
  reaction_26: PLacRNAP => PLac + RNAP; k02*PLacRNAP;
    k02 = 0.17;
  reaction_27: PLacRNAP => TrLacZ1; k03*PLacRNAP;
    k03 = 1;
  reaction_28: TrLacZ1 => RbsLacZ + PLac + TrLacZ2; k04*TrLacZ1;
    k04 = 1;
  reaction_29: TrLacZ2 => TrLacY2; k05*TrLacZ2;
    k05 = 0.015;
  reaction_30: TrLacY1 => RbsLacY + TrLacY2; k06*TrLacY1;
    k06 = 1;
  reaction_31: TrLacY2 => RNAP; k07*TrLacY2;
    k07 = 0.36;
  reaction_32: Ribosome + RbsLacZ => RbsribosomeLacZ; k08*Ribosome*RbsLacZ;
    k08 = 0.17;
  reaction_33: RbsribosomeLacZ => Ribosome + RbsLacZ; k09*RbsribosomeLacZ;
    k09 = 0.17;
  reaction_34: Ribosome + RbsLacY => RbsribosomeLacY; k10*Ribosome*RbsLacY;
    k10 = 0.45;
  reaction_35: RbsribosomeLacY => Ribosome + RbsLacY; k11*RbsribosomeLacY;
    k11 = 0.45;
  reaction_36: RbsribosomeLacZ => TrRbsLacZ + RbsLacZ; k12*RbsribosomeLacZ;
    k12 = 0.4;
  reaction_37: RbsribsomeLacY => TrRbsLacY + RbsLacY; k13*RbsribsomeLacY;
    k13 = 0.4;
  reaction_38: TrRbsLacZ => LacZ; k14*TrRbsLacZ;
    k14 = 0.015;
  reaction_39: TrRbsLacZ => LacY; k15*TrRbsLacZ;
    k15 = 0.036;
  reaction_40: LacZ => dgrLacZ; k16*LacZ;
    k16 = 6.42e-5;
  reaction_41: LacY => dgrLacY; k17*LacY;
    k17 = 6.42e-5;
  reaction_42: RbsLacZ => dgrLacY; k18*RbsLacZ;
    k18 = 0.3;
  reaction_43: RbsLacZ => dgrRbsLacY; k19*RbsLacZ;
    k19 = 0.3;
  reaction_44: LacZ + lactose => LacZlactose; k20*LacZ*lactose;
    k20 = 9.52e-5;
  reaction_45: LacZlactose => product + LacZ; k21*LacZlactose;
    k21 = 431;
  reaction_46: LacY => lactose + LacY; k22*LacY;
    k22 = 14;
end
