// SBML level 2 version 4

model model1()
  // dimerization

  // Compartments:
  compartment Comp1 = 1; Comp1 is "unnamed";

  // Species:
  substanceOnly species S1 in Comp1 = 4150;  // substance in MWBUILTINUNIT_molecule
  substanceOnly species S2 in Comp1 = 39565;  // substance in MWBUILTINUNIT_molecule
  substanceOnly species S3 in Comp1 = 3445;  // substance in MWBUILTINUNIT_molecule

  // Reactions:
  R1: S1 => ; k1*S1;
    k1 = 1;
  R2: 2 S1 => S2; k2*S1^2;
    k2 = 0.02;
  R3: S2 => 2 S1; k3*S2;
    k3 = 0.5;
  R4: S2 => S3; k4*S2;
    k4 = 0.04;

  // Unit definitions:
  unit MWBUILTINUNIT_molecule = 1.660539e-24 mole;
end
