// SBML level 2 version 4

model model1()
  // egfr

  // Compartments:
  compartment Comp1 = 1; Comp1 is "unnamed";

  // Species:
  substanceOnly species EGFR in Comp1 = 0;  // substance in MWBUILTINUNIT_molecule
  substanceOnly species EGF in Comp1 = 1;  // substance in MWBUILTINUNIT_molecule
  substanceOnly species EGFxEGFR in Comp1 = 581;  // substance in MWBUILTINUNIT_molecule
  substanceOnly species EGFxEGFR2 in Comp1 = 24;  // substance in MWBUILTINUNIT_molecule
  substanceOnly species EGFxEGFR2xP in Comp1 = 28; EGFxEGFR2xP is "2EGFxEGFR";  // substance in MWBUILTINUNIT_molecule
  substanceOnly species PLCg in Comp1 = 4; PLCg is "EGFxEGFR2xP";  // substance in MWBUILTINUNIT_molecule
  substanceOnly species EGFxEGFR2xPLCg in Comp1 = 1;  // substance in MWBUILTINUNIT_molecule
  substanceOnly species EGFxEGFR2xPLCgxP in Comp1 = 1;  // substance in MWBUILTINUNIT_molecule
  substanceOnly species PLCgxP in Comp1 = 1; PLCgxP is "EGFxEGFR2xPLCgxP";  // substance in MWBUILTINUNIT_molecule
  substanceOnly species Grb2 in Comp1 = 4; Grb2 is "PLCgxP";  // substance in MWBUILTINUNIT_molecule
  substanceOnly species EGFxEGFR2xGrb2 in Comp1 = 15;  // substance in MWBUILTINUNIT_molecule
  substanceOnly species SOS in Comp1 = 3; SOS is "EGFxEGFR2xGrb2";  // substance in MWBUILTINUNIT_molecule
  substanceOnly species EGFxEGFR2xGrb2xSOS in Comp1 = 2;  // substance in MWBUILTINUNIT_molecule
  substanceOnly species Grb2xSOS in Comp1 = 1; Grb2xSOS is "EGFxEGFR2xGrb2xSOS";  // substance in MWBUILTINUNIT_molecule
  substanceOnly species Shc in Comp1 = 2; Shc is "Grb2xSOS";  // substance in MWBUILTINUNIT_molecule
  substanceOnly species EGFxEGFR2xShc in Comp1 = 2;  // substance in MWBUILTINUNIT_molecule
  substanceOnly species EGFxEGFRxShcxP in Comp1 = 1; EGFxEGFRxShcxP is "EGFxEGFR2xShc";  // substance in MWBUILTINUNIT_molecule
  substanceOnly species ShcxP in Comp1 = 2; ShcxP is "EGFxEGFRxShcxP";  // substance in MWBUILTINUNIT_molecule
  substanceOnly species EGFxEGFR2xShcxGrb2 in Comp1 = 82; EGFxEGFR2xShcxGrb2 is "ShcxP";  // substance in MWBUILTINUNIT_molecule
  substanceOnly species ShcxGrb2 in Comp1 = 1; ShcxGrb2 is "EGFxEGFR2xShcxGrb2";  // substance in MWBUILTINUNIT_molecule
  substanceOnly species EGFxEGFR2xShcxGrb2xSOS in Comp1 = 36;  // substance in MWBUILTINUNIT_molecule
  substanceOnly species ShcxGrb2xSOS in Comp1 = 1; ShcxGrb2xSOS is "EGFxEGFR2xShcxGrb2xSOS";  // substance in MWBUILTINUNIT_molecule
  substanceOnly species PLCgPxI in Comp1 = 30; PLCgPxI is "ShcxGrb2xSOS";  // substance in MWBUILTINUNIT_molecule
  species PLCgPxI_25 in Comp1 = 0;

  // Reactions:
  R01: EGFR + EGF => EGFxEGFR; k01*EGFR*EGF;
    k01 = 0.003;
  R02: EGFxEGFR => EGFR + EGF; k02*EGFxEGFR;
    k02 = 0.06;
  R03: 2 EGFxEGFR => EGFxEGFR2; k03*EGFxEGFR^2;
    k03 = 0.01;
  R04: EGFxEGFR2 => EGFxEGFR2xP; k04*EGFxEGFR2;
    k04 = 0.1;
  R05: EGFxEGFR2 => PLCg; k05*EGFxEGFR2;
    k05 = 1;
  R06: PLCg => EGFxEGFR2; k06*PLCg;
    k06 = 450;
  R07: PLCg + EGFxEGFR2xPLCg => EGFxEGFR2xPLCgxP; k07*PLCg*EGFxEGFR2xPLCg;
    k07 = 0.06;
  R08: EGFxEGFR2xPLCgxP => PLCg + EGFxEGFR2xPLCg; k08*EGFxEGFR2xPLCgxP;
    k08 = 0.2;
  R09: EGFxEGFR2xPLCgxP => PLCgxP; k09*EGFxEGFR2xPLCgxP;
    k09 = 1;
  R10: PLCgxP => PLCgxP; k10*PLCgxP;
    k10 = 0.05;
  R11: PLCgxP => Grb2 + PLCg; k11*PLCgxP;
    k11 = 0.3;
  R12: Grb2 + PLCg => PLCgxP; k12*Grb2*PLCg;
    k12 = 0.006;
  R13: Grb2 => EGFxEGFR2xPLCg; k13*Grb2;
    k13 = 1;
  R14: EGFxEGFR2xGrb2 + PLCg => SOS; k14*EGFxEGFR2xGrb2*PLCg;
    k14 = 0.003;
  R15: SOS => EGFxEGFR2xGrb2 + PLCg; k15*SOS;
    k15 = 0.05;
  R16: SOS + EGFxEGFR2xGrb2xSOS => Grb2xSOS; k16*SOS*EGFxEGFR2xGrb2xSOS;
    k16 = 0.01;
  R17: Grb2xSOS => SOS + EGFxEGFR2xGrb2xSOS; k17*Grb2xSOS;
    k17 = 0.06;
  R18: Grb2xSOS => Shc + PLCg; k18*Grb2xSOS;
    k18 = 0.03;
  R19: Shc + PLCg => Grb2xSOS; k19*Shc*PLCg;
    k19 = 0.0045;
  R20: Shc => EGFxEGFR2xGrb2 + EGFxEGFR2xGrb2xSOS; k20*Shc;
    k20 = 0.0015;
  R21: EGFxEGFR2xGrb2 + EGFxEGFR2xGrb2xSOS => Shc; k21*EGFxEGFR2xGrb2*EGFxEGFR2xGrb2xSOS;
    k21 = 0.0001;
  R22: EGFxEGFR2xShc + PLCg => EGFxEGFRxShcxP; k22*EGFxEGFR2xShc*PLCg;
    k22 = 0.09;
  R23: EGFxEGFRxShcxP => EGFxEGFR2xShc + PLCg; k23*EGFxEGFRxShcxP;
    k23 = 0.6;
  R24: EGFxEGFRxShcxP => ShcxP; k24*EGFxEGFRxShcxP;
    k24 = 6;
  R25: ShcxP => EGFxEGFRxShcxP; k25*ShcxP;
    k25 = 0.06;
  R26: ShcxP => PLCg + EGFxEGFR2xShcxGrb2; k26*ShcxP;
    k26 = 0.3;
  R27: PLCg + EGFxEGFR2xShcxGrb2 => ShcxP; k27*PLCg*EGFxEGFR2xShcxGrb2;
    k27 = 0.0009;
  R28: EGFxEGFR2xShcxGrb2 => EGFxEGFR2xShc; k28*EGFxEGFR2xShcxGrb2;
    k28 = 1.7;
  R29: ShcxP + EGFxEGFR2xGrb2 => ShcxGrb2; k29*ShcxP*EGFxEGFR2xGrb2;
    k29 = 0.003;
  R30: ShcxGrb2 => ShcxP + EGFxEGFR2xGrb2; k30*ShcxGrb2;
    k30 = 0.1;
  R31: ShcxGrb2 => EGFxEGFR2xShcxGrb2xSOS + PLCg; k31*ShcxGrb2;
    k31 = 0.3;
  R32: EGFxEGFR2xShcxGrb2xSOS + PLCg => ShcxGrb2; k32*EGFxEGFR2xShcxGrb2xSOS*PLCg;
    k32 = 0.0009;
  R33: EGFxEGFR2xGrb2xSOS + ShcxGrb2 => ShcxGrb2xSOS; k33*EGFxEGFR2xGrb2xSOS*ShcxGrb2;
    k33 = 0.01;
  R34: ShcxGrb2xSOS => EGFxEGFR2xGrb2xSOS + ShcxGrb2; k34*ShcxGrb2xSOS;
    k34 = 0.0214;
  R35: ShcxGrb2xSOS => PLCgPxI + PLCg; k35*ShcxGrb2xSOS;
    k35 = 0.12;
  R36: PLCgPxI + PLCg => ShcxGrb2xSOS; k36*PLCgPxI*PLCg;
    k36 = 0.0002;
  R37: EGFxEGFR2xGrb2 + EGFxEGFR2xShcxGrb2 => EGFxEGFR2xShcxGrb2xSOS; k37*EGFxEGFR2xGrb2*EGFxEGFR2xShcxGrb2;
    k37 = 0.003;
  R38: EGFxEGFR2xShcxGrb2xSOS => EGFxEGFR2xGrb2 + EGFxEGFR2xShcxGrb2; k38*EGFxEGFR2xShcxGrb2xSOS;
    k38 = 0.1;
  R39: EGFxEGFR2xShcxGrb2xSOS + EGFxEGFR2xGrb2xSOS => PLCgPxI; k39*EGFxEGFR2xShcxGrb2xSOS*EGFxEGFR2xGrb2xSOS;
    k39 = 0.03;
  R40: PLCgPxI => EGFxEGFR2xShcxGrb2xSOS + EGFxEGFR2xGrb2xSOS; k40*PLCgPxI;
    k40 = 0.064;
  R41: PLCgPxI => Shc + EGFxEGFR2xShcxGrb2; k41*PLCgPxI;
    k41 = 0.1;
  R42: Shc + EGFxEGFR2xShcxGrb2 => PLCgPxI; k42*Shc*EGFxEGFR2xShcxGrb2;
    k42 = 0.021;
  R43: ShcxP + Shc => ShcxGrb2xSOS; k43*ShcxP*Shc;
    k43 = 0.009;
  R44: ShcxGrb2xSOS => ShcxP + Shc; k44*ShcxGrb2xSOS;
    k44 = 0.0429;
  R45: Grb2 => PLCgPxI_25; k45*Grb2;
    k45 = 1;
  R46: PLCgPxI_25 => Grb2; k46*PLCgPxI_25;
    k46 = 0.03;

  // Unit definitions:
  unit MWBUILTINUNIT_molecule = 1.660539e-24 mole;
end
