// SBML level 2 version 4

model model1()
  // lacy_lacz2

  // Compartments:
  compartment Comp1 = 1; Comp1 is "unnamed";

  // Species:
  substanceOnly species PLac in Comp1 = 1;  // substance in MWBUILTINUNIT_molecule
  substanceOnly species RNAP in Comp1 = 350;  // substance in MWBUILTINUNIT_molecule
  substanceOnly species PLacRNAP in Comp1 = 0;  // substance in MWBUILTINUNIT_molecule
  substanceOnly species TrLacZ1 in Comp1 = 0;  // substance in MWBUILTINUNIT_molecule
  substanceOnly species RbsLacZ in Comp1 = 0;  // substance in MWBUILTINUNIT_molecule
  substanceOnly species TrLacZ2 in Comp1 = 0;  // substance in MWBUILTINUNIT_molecule
  substanceOnly species TrLacY1 in Comp1 = 0;  // substance in MWBUILTINUNIT_molecule
  substanceOnly species RbsLacY in Comp1 = 0;  // substance in MWBUILTINUNIT_molecule
  substanceOnly species TrLacY2 in Comp1 = 0;  // substance in MWBUILTINUNIT_molecule
  substanceOnly species Ribosome in Comp1 = 35;  // substance in MWBUILTINUNIT_molecule
  substanceOnly species RbsribosomeLacZ in Comp1 = 0;  // substance in MWBUILTINUNIT_molecule
  substanceOnly species RbsribosomeLacY in Comp1 = 0;  // substance in MWBUILTINUNIT_molecule
  substanceOnly species TrRbsLacZ in Comp1 = 0;  // substance in MWBUILTINUNIT_molecule
  substanceOnly species TrRbsLacY in Comp1 = 0;  // substance in MWBUILTINUNIT_molecule
  substanceOnly species LacZ in Comp1 = 0;  // substance in MWBUILTINUNIT_molecule
  substanceOnly species LacY in Comp1 = 0;  // substance in MWBUILTINUNIT_molecule
  substanceOnly species dgrLacZ in Comp1 = 0;  // substance in MWBUILTINUNIT_molecule
  substanceOnly species dgrLacY in Comp1 = 0;  // substance in MWBUILTINUNIT_molecule
  substanceOnly species dgrRbsLacZ in Comp1 = 0;  // substance in MWBUILTINUNIT_molecule
  substanceOnly species dgrRbsLacY in Comp1 = 0;  // substance in MWBUILTINUNIT_molecule
  substanceOnly species lactose in Comp1 = 0;  // substance in MWBUILTINUNIT_molecule
  substanceOnly species LacZlactose in Comp1 = 0;  // substance in MWBUILTINUNIT_molecule
  substanceOnly species product in Comp1 = 0;  // substance in MWBUILTINUNIT_molecule

  // Reactions:
  R01: PLac + RNAP => PLacRNAP; k01*PLac*RNAP;
    k01 = 0.17;
  R02: PLacRNAP => PLac + RNAP; k02*PLacRNAP;
    k02 = 10;
  R03: PLacRNAP => TrLacZ1; k03*PLacRNAP;
    k03 = 1;
  R04: TrLacZ1 => RbsLacZ + PLac + TrLacZ2; k04*TrLacZ1;
    k04 = 1;
  R05: TrLacZ2 => TrLacY1; k05*TrLacZ2;
    k05 = 0.015;
  R06: TrLacY1 => RbsLacY + TrLacY2; k06*TrLacY1;
    k06 = 1;
  R07: TrLacY2 => RNAP; k07*TrLacY2;
    k07 = 0.36;
  R08: Ribosome + RbsLacZ => RbsribosomeLacZ; k08*Ribosome*RbsLacZ;
    k08 = 0.17;
  R09: RbsribosomeLacZ => Ribosome + RbsLacZ; k09*RbsribosomeLacZ;
    k09 = 0.45;
  R10: Ribosome + RbsLacY => RbsribosomeLacY; k10*Ribosome*RbsLacY;
    k10 = 0.17;
  R11: RbsribosomeLacY => Ribosome + RbsLacY; k11*RbsribosomeLacY;
    k11 = 0.45;
  R12: RbsribosomeLacZ => TrRbsLacZ + RbsLacZ; k12*RbsribosomeLacZ;
    k12 = 0.4;
  R13: RbsribosomeLacY => TrRbsLacY + RbsLacY; k13*RbsribosomeLacY;
    k13 = 0.4;
  R14: TrRbsLacZ => LacZ; k14*TrRbsLacZ;
    k14 = 0.015;
  R15: TrRbsLacY => LacY; k15*TrRbsLacY;
    k15 = 0.036;
  R16: LacZ => dgrLacZ; k16*LacZ;
    k16 = 6.42e-5;
  R17: LacY => dgrLacY; k17*LacY;
    k17 = 6.42e-5;
  R18: RbsLacZ => dgrRbsLacZ; k18*RbsLacZ;
    k18 = 0.3;
  R19: RbsLacY => dgrRbsLacY; k19*RbsLacY;
    k19 = 0.3;
  R20: LacZ + lactose => LacZlactose; k20*LacZ*lactose;
    k20 = 9.52e-5;
  R21: LacZlactose => product + LacZ; k21*LacZlactose;
    k21 = 431;
  R22: LacY => lactose + LacY; k22*LacY;
    k22 = 14;

  // Unit definitions:
  unit MWBUILTINUNIT_molecule = 1.660539e-24 mole;
end
