// SBML level 2 version 4

model model1()
  // lacy_lacz

  // Compartments:
  compartment Comp1 = 1; Comp1 is "unnamed";

  // Species:
  substanceOnly species PLac in Comp1 = 1;  // substance in MWBUILTINUNIT_molecule
  substanceOnly species RNAP in Comp1 = 350;  // substance in MWBUILTINUNIT_molecule
  substanceOnly species PLacRNAP in Comp1 = 0;  // substance in MWBUILTINUNIT_molecule
  substanceOnly species TrLacZ1 in Comp1 = 0;  // substance in MWBUILTINUNIT_molecule
  substanceOnly species RbsLacZ in Comp1 = 0;  // substance in MWBUILTINUNIT_molecule
  substanceOnly species TrLacZ2 in Comp1 = 0;  // substance in MWBUILTINUNIT_molecule
  substanceOnly species TrLacY2 in Comp1 = 0;  // substance in MWBUILTINUNIT_molecule
  substanceOnly species TrLacY1 in Comp1 = 0;  // substance in MWBUILTINUNIT_molecule
  substanceOnly species RbsLacY in Comp1 = 0;  // substance in MWBUILTINUNIT_molecule
  substanceOnly species Ribosome in Comp1 = 35;  // substance in MWBUILTINUNIT_molecule
  substanceOnly species RbsribosomeLacZ in Comp1 = 0;  // substance in MWBUILTINUNIT_molecule
  substanceOnly species RbsribosomeLacY in Comp1 = 0;  // substance in MWBUILTINUNIT_molecule
  substanceOnly species TrRbsLacZ in Comp1 = 0;  // substance in MWBUILTINUNIT_molecule
  substanceOnly species RbsribsomeLacY in Comp1 = 0;  // substance in MWBUILTINUNIT_molecule
  substanceOnly species TrRbsLacY in Comp1 = 0;  // substance in MWBUILTINUNIT_molecule
  substanceOnly species LacZ in Comp1 = 0;  // substance in MWBUILTINUNIT_molecule
  substanceOnly species LacY in Comp1 = 0;  // substance in MWBUILTINUNIT_molecule
  substanceOnly species dgrLacZ in Comp1 = 0;  // substance in MWBUILTINUNIT_molecule
  substanceOnly species dgrLacY in Comp1 = 0;  // substance in MWBUILTINUNIT_molecule
  substanceOnly species dgrRbsLacY in Comp1 = 0;  // substance in MWBUILTINUNIT_molecule
  substanceOnly species lactose in Comp1 = 0;  // substance in MWBUILTINUNIT_molecule
  substanceOnly species LacZlactose in Comp1 = 0;  // substance in MWBUILTINUNIT_molecule
  substanceOnly species product in Comp1 = 0;  // substance in MWBUILTINUNIT_molecule

  // Reactions:
  R1: PLac + RNAP => PLacRNAP; k1*PLac*RNAP;
    k1 = 0.17;
  R2: PLacRNAP => PLac + RNAP; k2*PLacRNAP;
    k2 = 10;
  R3: PLacRNAP => TrLacZ1; k3*PLacRNAP;
    k3 = 1;
  R4: TrLacZ1 => RbsLacZ + PLac + TrLacZ2; k4*TrLacZ1;
    k4 = 1;
  R5: TrLacZ2 => TrLacY2; k5*TrLacZ2;
    k5 = 0.015;
  R6: TrLacY1 => RbsLacY + TrLacY2; k6*TrLacY1;
    k6 = 1;
  R7: TrLacY2 => RNAP; k7*TrLacY2;
    k7 = 0.36;
  R8: Ribosome + RbsLacZ => RbsribosomeLacZ; k8*Ribosome*RbsLacZ;
    k8 = 0.17;
  R9: RbsribosomeLacZ => Ribosome + RbsLacZ; k9*RbsribosomeLacZ;
    k9 = 0.17;
  R10: Ribosome + RbsLacY => RbsribosomeLacY; k10*Ribosome*RbsLacY;
    k10 = 0.45;
  R11: RbsribosomeLacY => Ribosome + RbsLacY; k11*RbsribosomeLacY;
    k11 = 0.45;
  R12: RbsribosomeLacZ => TrRbsLacZ + RbsLacZ; k12*RbsribosomeLacZ;
    k12 = 0.4;
  R13: RbsribsomeLacY => TrRbsLacY + RbsLacY; k13*RbsribsomeLacY;
    k13 = 0.4;
  R14: TrRbsLacZ => LacZ; k14*TrRbsLacZ;
    k14 = 0.015;
  R15: TrRbsLacZ => LacY; k15*TrRbsLacZ;
    k15 = 0.036;
  R16: LacZ => dgrLacZ; k16*LacZ;
    k16 = 6.42e-5;
  R17: LacY => dgrLacY; k17*LacY;
    k17 = 6.42e-5;
  R18: RbsLacZ => dgrLacY; k18*RbsLacZ;
    k18 = 0.3;
  R19: RbsLacZ => dgrRbsLacY; k19*RbsLacZ;
    k19 = 0.3;
  R20: LacZ + lactose => LacZlactose; k20*LacZ*lactose;
    k20 = 9.52e-5;
  R21: LacZlactose => product + LacZ; k21*LacZlactose;
    k21 = 431;
  R22: LacY => lactose + LacY; k22*LacY;
    k22 = 14;

  // Unit definitions:
  unit MWBUILTINUNIT_molecule = 1.660539e-24 mole;
end
