// SBML level 2 version 4

model model1()
  // egfr

  // Compartments:
  compartment Comp1 = 1; Comp1 is "unnamed";

  // Species:
  substanceOnly species EGFR in Comp1 = 0;  // substance in MWBUILTINUNIT_molecule
  substanceOnly species EGF in Comp1 = 1;  // substance in MWBUILTINUNIT_molecule
  substanceOnly species EGFxEGFR in Comp1 = 581;  // substance in MWBUILTINUNIT_molecule
  substanceOnly species EGFxEGFR2 in Comp1 = 24;  // substance in MWBUILTINUNIT_molecule
  substanceOnly species EGFxEGFR2xP in Comp1 = 28;  // substance in MWBUILTINUNIT_molecule
  substanceOnly species PLCg in Comp1 = 4;  // substance in MWBUILTINUNIT_molecule
  substanceOnly species EGFxEGFR2xPLCg in Comp1 = 1;  // substance in MWBUILTINUNIT_molecule
  substanceOnly species EGFxEGFR2xPLCgxP in Comp1 = 1;  // substance in MWBUILTINUNIT_molecule
  substanceOnly species PLCgxP in Comp1 = 1;  // substance in MWBUILTINUNIT_molecule
  substanceOnly species Grb2 in Comp1 = 4;  // substance in MWBUILTINUNIT_molecule
  substanceOnly species EGFxEGFR2xGrb2 in Comp1 = 15;  // substance in MWBUILTINUNIT_molecule
  substanceOnly species SOS in Comp1 = 3;  // substance in MWBUILTINUNIT_molecule
  substanceOnly species EGFxEGFR2xGrb2xSOS in Comp1 = 2;  // substance in MWBUILTINUNIT_molecule
  substanceOnly species Grb2xSOS in Comp1 = 1;  // substance in MWBUILTINUNIT_molecule
  substanceOnly species Shc in Comp1 = 2;  // substance in MWBUILTINUNIT_molecule
  substanceOnly species EGFxEGFR2xShc in Comp1 = 2;  // substance in MWBUILTINUNIT_molecule
  substanceOnly species EGFxEGFRxShcxP in Comp1 = 1;  // substance in MWBUILTINUNIT_molecule
  substanceOnly species ShcxP in Comp1 = 2;  // substance in MWBUILTINUNIT_molecule
  substanceOnly species EGFxEGFR2xShcxGrb2 in Comp1 = 82;  // substance in MWBUILTINUNIT_molecule
  substanceOnly species ShcxGrb2 in Comp1 = 1;  // substance in MWBUILTINUNIT_molecule
  substanceOnly species EGFxEGFR2xShcxGrb2xSOS in Comp1 = 36;  // substance in MWBUILTINUNIT_molecule
  substanceOnly species ShcxGrb2xSOS in Comp1 = 1;  // substance in MWBUILTINUNIT_molecule
  substanceOnly species PLCgPxI in Comp1 = 30;  // substance in MWBUILTINUNIT_molecule

  // Reactions:
  R01: EGFR + EGF => EGFxEGFR; k01*EGFR*EGF;
    k01 = 0.003;
  R02: EGFxEGFR => EGFR + EGF; k02*EGFxEGFR;
    k02 = 0.06;
  R03: 2 EGFxEGFR => EGFxEGFR2; k03*EGFxEGFR^2;
    k03 = 0.01;
  R04: EGFxEGFR2 => 2 EGFxEGFR; k04*EGFxEGFR2;
    k04 = 0.1;
  R05: EGFxEGFR2 => EGFxEGFR2xP; k05*EGFxEGFR2;
    k05 = 1;
  R06: EGFxEGFR2xP => EGFxEGFR2; k06*EGFxEGFR2xP;
    k06 = 450;
  R07: EGFxEGFR2xP + PLCg => EGFxEGFR2xPLCg; k07*EGFxEGFR2xP*PLCg;
    k07 = 0.06;
  R08: EGFxEGFR2xPLCg => EGFxEGFR2xP + PLCg; k08*EGFxEGFR2xPLCg;
    k08 = 0.2;
  R09: EGFxEGFR2xPLCg => EGFxEGFR2xPLCgxP; k09*EGFxEGFR2xPLCg;
    k09 = 1;
  R10: EGFxEGFR2xPLCgxP => EGFxEGFR2xPLCgxP; k10*EGFxEGFR2xPLCgxP;
    k10 = 0.05;
  R11: EGFxEGFR2xPLCgxP => PLCgxP + EGFxEGFR2xP; k11*EGFxEGFR2xPLCgxP;
    k11 = 0.3;
  R12: PLCgxP + EGFxEGFR2xP => EGFxEGFR2xPLCgxP; k12*PLCgxP*EGFxEGFR2xP;
    k12 = 0.006;
  R13: PLCgxP => PLCg; k13*PLCgxP;
    k13 = 1;
  R14: Grb2 + EGFxEGFR2xP => EGFxEGFR2xGrb2; k14*Grb2*EGFxEGFR2xP;
    k14 = 0.003;
  R15: EGFxEGFR2xGrb2 => Grb2 + EGFxEGFR2xP; k15*EGFxEGFR2xGrb2;
    k15 = 0.05;
  R16: EGFxEGFR2xGrb2 + SOS => EGFxEGFR2xGrb2xSOS; k16*EGFxEGFR2xGrb2*SOS;
    k16 = 0.01;
  R17: EGFxEGFR2xGrb2xSOS => EGFxEGFR2xGrb2 + SOS; k17*EGFxEGFR2xGrb2xSOS;
    k17 = 0.06;
  R18: EGFxEGFR2xGrb2xSOS => Grb2xSOS + EGFxEGFR2xP; k18*EGFxEGFR2xGrb2xSOS;
    k18 = 0.03;
  R19: Grb2xSOS + EGFxEGFR2xP => EGFxEGFR2xGrb2xSOS; k19*Grb2xSOS*EGFxEGFR2xP;
    k19 = 0.0045;
  R20: Grb2xSOS => Grb2 + SOS; k20*Grb2xSOS;
    k20 = 0.0015;
  R21: Grb2 + SOS => Grb2xSOS; k21*Grb2*SOS;
    k21 = 0.0001;
  R22: Shc + EGFxEGFR2xP => EGFxEGFR2xShc; k22*Shc*EGFxEGFR2xP;
    k22 = 0.09;
  R23: EGFxEGFR2xShc => Shc + EGFxEGFR2xP; k23*EGFxEGFR2xShc;
    k23 = 0.6;
  R24: EGFxEGFR2xShc => EGFxEGFRxShcxP; k24*EGFxEGFR2xShc;
    k24 = 6;
  R25: EGFxEGFRxShcxP => EGFxEGFR2xShc; k25*EGFxEGFRxShcxP;
    k25 = 0.06;
  R26: EGFxEGFRxShcxP => EGFxEGFR2xP + ShcxP; k26*EGFxEGFRxShcxP;
    k26 = 0.3;
  R27: EGFxEGFR2xP + ShcxP => EGFxEGFRxShcxP; k27*EGFxEGFR2xP*ShcxP;
    k27 = 0.0009;
  R28: ShcxP => Shc; k28*ShcxP;
    k28 = 1.7;
  R29: EGFxEGFRxShcxP + Grb2 => EGFxEGFR2xShcxGrb2; k29*EGFxEGFRxShcxP*Grb2;
    k29 = 0.003;
  R30: EGFxEGFR2xShcxGrb2 => EGFxEGFRxShcxP + Grb2; k30*EGFxEGFR2xShcxGrb2;
    k30 = 0.1;
  R31: EGFxEGFR2xShcxGrb2 => ShcxGrb2 + EGFxEGFR2xP; k31*EGFxEGFR2xShcxGrb2;
    k31 = 0.3;
  R32: ShcxGrb2 + EGFxEGFR2xP => EGFxEGFR2xShcxGrb2; k32*ShcxGrb2*EGFxEGFR2xP;
    k32 = 0.0009;
  R33: SOS + EGFxEGFR2xShcxGrb2 => EGFxEGFR2xShcxGrb2xSOS; k33*SOS*EGFxEGFR2xShcxGrb2;
    k33 = 0.01;
  R34: EGFxEGFR2xShcxGrb2xSOS => SOS + EGFxEGFR2xShcxGrb2; k34*EGFxEGFR2xShcxGrb2xSOS;
    k34 = 0.0214;
  R35: EGFxEGFR2xShcxGrb2xSOS => ShcxGrb2xSOS + EGFxEGFR2xP; k35*EGFxEGFR2xShcxGrb2xSOS;
    k35 = 0.12;
  R36: ShcxGrb2xSOS + EGFxEGFR2xP => EGFxEGFR2xShcxGrb2xSOS; k36*ShcxGrb2xSOS*EGFxEGFR2xP;
    k36 = 0.0002;
  R37: Grb2 + ShcxP => ShcxGrb2; k37*Grb2*ShcxP;
    k37 = 0.003;
  R38: ShcxGrb2 => Grb2 + ShcxP; k38*ShcxGrb2;
    k38 = 0.1;
  R39: ShcxGrb2 + SOS => ShcxGrb2xSOS; k39*ShcxGrb2*SOS;
    k39 = 0.03;
  R40: ShcxGrb2xSOS => ShcxGrb2 + SOS; k40*ShcxGrb2xSOS;
    k40 = 0.064;
  R41: ShcxGrb2xSOS => Grb2xSOS + ShcxP; k41*ShcxGrb2xSOS;
    k41 = 0.1;
  R42: Grb2xSOS + ShcxP => ShcxGrb2xSOS; k42*Grb2xSOS*ShcxP;
    k42 = 0.021;
  R43: EGFxEGFRxShcxP + Grb2xSOS => EGFxEGFR2xShcxGrb2xSOS; k43*EGFxEGFRxShcxP*Grb2xSOS;
    k43 = 0.009;
  R44: EGFxEGFR2xShcxGrb2xSOS => EGFxEGFRxShcxP + Grb2xSOS; k44*EGFxEGFR2xShcxGrb2xSOS;
    k44 = 0.0429;
  R45: PLCgxP => PLCgPxI; k45*PLCgxP;
    k45 = 1;
  R46: PLCgPxI => PLCgxP; k46*PLCgPxI;
    k46 = 0.03;

  // Unit definitions:
  unit MWBUILTINUNIT_molecule = 1.660539e-24 mole;
end
