// SBML level 2 version 4

model model1()
  // p53

  // Compartments:
  compartment Comp1 = 1; Comp1 is "unnamed";

  // Species:
  substanceOnly species p53 in Comp1 = 40000;  // substance in MWBUILTINUNIT_molecule
  substanceOnly species mdm2pre in Comp1 = 40000;  // substance in MWBUILTINUNIT_molecule
  substanceOnly species mdm2 in Comp1 = 40000;  // substance in MWBUILTINUNIT_molecule

  // Reactions:
  R1: => p53; k1;
    k1 = 90;
  R2: p53 => ; k2*p53;
    k2 = 0.002;
  R3: p53 => p53 + mdm2pre; k3*p53;
    k3 = 1.1;
  R4: mdm2pre => mdm2; k4*mdm2pre;
    k4 = 0.8;
  R5: mdm2 => ; k5*mdm2;
    k5 = 0.8;

  // Unit definitions:
  unit MWBUILTINUNIT_molecule = 1.660539e-24 mole;
end
